ϕ_tv(f) :=
    (180/π*arg(T_v(1i*2*π*f))) if (180/π*arg(T_v(1i*2*π*f)) > -180)
    (180/π*arg(T_v(1i*2*π*f)) - 360) otherwise  # error: 该变量未定义。
# SOP of DCD （数字控制设计的标准作业流程）
# ----V1.0, 2023/2/15, by Shane Chen
#
# 1. Plant  : 明确控制对象和控制目标
# 2. Modelling  : 小信号建模
# 3. Design  : PI/PR调节器的设计
# 4. Simulation (optional) : 仿真验证
# 5. Discretization  : 离散化
# 6. Tuning  : 从初始参数到最终最终的路径
# 1. Plant: 明确控制对象和控制目标
# - Circuit Topology of Plant:
并网型单相逆变器，单电流环
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# - Circuit Parameters of Plant:
# Resistive load (ohm)
R_o := 1.2
# Inductance (H)
L_o := 10.0*10^-3
# Switching frequency (Hz)
f_sw := 5000
# DC bus volt.(V)
V_dc := 400
# Back EMF volt. (V)
V_EMF := 220
# Back EMF freq. (Hz)
f_EMF := 50
# Sampling frequency (Hz)
f_s := 2*f_sw
f_s = 10000
# - Circuit Target of Plant:
# 1. 控制目标  ：并网电流
# 2. 环路结构  ：单电流环
# 3. 电流指令给定方式  ： 外部给定
# 4. 相位裕度  ：>40 degree
# 5. 带宽  ：> 1kHz
# 2. Modelling: 小信号建模
# - Small Signal Model of Plant:
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# 3. Design: PI/PR调节器的设计
# - Open loop transfer function and bode plot:
# Transfer function of regulator
G_pi(s, K_p, T_i) := K_p*(1 + 1/(s*T_i))
# Control Delay
# (Asymmetrically sampled PWM)
T_d := 1.5/f_s
# Transfer function of control delay
G_d(s) := e^(-s*T_d)
T_p := L_o/R_o
# Transfer function of plant
G_plant(s) := 1/R_o*1/(1 + s*T_p)
# Open loop transfer function
G_o(s, K_p, T_i) := G_pi(s, K_p, T_i)*G_d(s)*V_dc*G_plant(s)
j := sqrt(-1)
f := 1 .. 20000
# Gain, K is used to implement unitless
A_o(f, K_p, T_i) := |G_o(j*2*π*f, K_p, T_i)|
# Gain function
L_ol(f, K_p, T_i) := 20*log(A_o(f, K_p, T_i))
# Phase function
ϕ_ol(f, K_p, T_i) :=
    (180/π*arg(G_o(j*2*π*f, K_p, T_i))) if (180/π*arg(G_o(j*2*π*f, K_p, T_i)) < 0)
    (180/π*arg(G_o(j*2*π*f, K_p, T_i)) - 360) otherwise
# Compensator 1
K_p1 := 1
T_i1 := 10000
# Compensator 2
K_p2 := 0.1
T_i2 := 0.001
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# - Peak gain search:
# Required phase margin:
ϕ_m_min := 40
# Initial parameters for search:
f_search := 1000
K_p := 0.1
T_i := 0.001
# Search process:
Given
L_ol(f_search, K_p, T_i) == 0
ϕ_ol(f_search, K_p, T_i) + 180 ≥ ϕ_m_min
f_search > 0
K_p > 0
0 ≤ T_i < 0.01
Q(f_search, K_p, T_i) := K_p
Maximize(Q, f_search, K_p, T_i) = [929.558; 0.146024; 0.01]
# Search result:
f_c_searched := 929
K_p_searched := 0.146
T_i_searched := 0.01
# Phase margin:
ϕ_ol(f_c_searched, K_p_searched, T_i_searched) + 180 = 40.0302
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# - Peak gain approximation:
# Control delay:
T_d = 0.00015
ϕ_m_rad := ϕ_m_min*π/180
ϕ_m_rad = 0.698132
# Estimated cross frquency:
ω_c_max_estimate := (π/2 - ϕ_m_rad)/T_d = 5817.76
f_c_max_estimate := ω_c_max_estimate/(2*π) = 925.926
# Estimated maximum gain:
K_p_max_estimate := ω_c_max_estimate*L_o/V_dc = 0.145444
# Estimated integral time:
T_i_estimate := 10/ω_c_max_estimate = 0.00171887
# Estimated phase margin:
ϕ_ol(ω_c_max_estimate/(2*π), K_p_max_estimate, T_i_estimate) + 180 = 35.471
# 4. Simulation: 仿真验证
# - Simulation circuit:
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# - Simulation result:
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# 5. Discretization: 离散化
# - 后向差分法:
# initialized parameters:
K_p_init := K_p_max_estimate
T_i_init := T_i_estimate
# conversion from s-domain to z-domain:
s == (1 - z^-1)/T_s
T_s := 1/f_s = 0.0001
# transfer function in z-domain:
G_pi_z(z, K_p, T_i) := K_p*(1 + 1/((1 - z^-1)/T_s*T_i))
# commonly used type in MCU:
Y(n) == K_p_mcu*(X(n) - X(n - 1)) + K_i_mcu*X(n) + Y(n - 1)
K_p_mcu := K_p_init = 0.145444
K_i_mcu := K_p_init*T_s/T_i_init = 0.00846159
# 6. Tunning: 从初始参数到最终参数的路径
# - 调参经验法：
# 1. 利用阶跃响应调节PI
# 2. 先Kp，再Ki
# 3. Kp调到最大值（观测到发生振荡），再回调节至一定比例，如最大值的一半
# 4. Ki的调节需要兼顾超调和响应时间
